<neuroml xmlns="http://www.neuroml.org/schema/neuroml2"  xmlns:xs="http://www.w3.org/2001/XMLSchema" xmlns:xsi="http://www.w3.org/2001/XMLSchema-instance" xsi:schemaLocation="http://www.neuroml.org/schema/neuroml2 https://raw.github.com/NeuroML/NeuroML2/development/Schemas/NeuroML2/NeuroML_v2.3.1.xsd" id="RMD_nca">
    <notes>An ion channel from cell RMD from Nicoletti et al. 2019</notes>
    <ionChannelHH id="RMD_nca" species="non_specific" conductance="10pS">
        <notes>RMD_nca channel from Nicoletti et al. 2019</notes>
    </ionChannelHH>
</neuroml>
